# Параметры гиротрона  28,12 на второй гармонике
# Ускоряющее напряжение [кВ]:
U := 22
# Ток пучка [А]:
I_a := 2
# Магнитная индукция [T]:
B := 0.518
# Питч-фактор:
q := 1.5
# Добротность гиротронов:
Q_12 := 3127.5553
# Gmp для TE02:
G_02 := 0.0487150569674
# Норма:
N_12 := 3.1587
# Номер гармоники:
n := 2
# Опорная частота [ГГц]:
f_op := 28.0175
# Циклическая опорная частота (1/сек):
ω_op := 2*π*f_op*10^9
# Скорость света [см/сек]:
c := 299792458*10^2
# Заряд электрона [ед. СГС]:
q_e := 4.803*10^-10
# Масса электрона [г]:
m_e := 9.1093837015*10^-28
γ := 1 + U/511
β := sqrt(1 - γ^-2)
β_z := sqrt((1 - γ^-2)/(q^2 + 1))
β_r := sqrt(β^2 - β_z^2)
# Длина резонатора [см]:
L := 18.55
# Безразмерная длина:
Z_ex := β_r^2*ω_op*L/(2*β_z*n*c) = 9.66379
# Безразмерный ток:
I := 2.35*10^-4*I_a*(n^(n + 1)/(2^(n - 1)*n!))^2*Q_12*G_02*β_r^(2*n - 4)/(γ*β_z*N_12) = 0.551212
# Нерелятивистская гирочастота электрона [1/сек]:
ω_н := q_e*B*10000/(m_e*c) = 9.1103e10
# Расстройка циклотронного синхронизма:
Δ := 2/β_r^2*(1 - n*ω_н/(γ*ω_op)) = 0.274805
